**%   ============================================================
**%
**%              I-DEAS 12M1 ABAQUS STANDARD TRANSLATOR
**%                     FOR ABAQUS VERSION 6.x
**%
**%          MODEL FILE: C:\eprouvette_revue2.mf1
**%          INPUT FILE: E:\CATIA\Exemples_Catia\PlaqueCarreTrouCentral\PlaqueCarreTrouCentral.inp
**%            EXPORTED: AT 10:18:20 ON 01-Jan-02
**%                PART: PlaqueCarreTrouCentral
**%                 FEM: Fem1
**%
**%               UNITS: MN-mm (newton)
**%                     ... LENGTH : mm
**%                     ... TIME   : sec
**%                     ... MASS   : tonne (t)
**%                     ... FORCE  : newton
**%                     ... TEMPERATURE : deg Celsius
**%
**%         COORDINATE SYSTEM: PART
**%
**%             SUBSET EXPORT: OFF
**%
**%       NODE ZERO TOLERANCE: OFF
**%
**%   ============================================================
**%
**%
*HEADING
SDRC I-DEAS ABAQUS FILE TRANSLATOR  01-Jan-02   10:18:20
**%==========================================
**%          MODAL DATA
**%==========================================
*NODE, NSET=ALLNODES, SYSTEM=R
          1, 2.0000000E+01, 1.3051714E+01, 2.9201934E+01
          2, 2.0000000E+01, 3.6843481E+00, 2.7369882E+01
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*ELEMENT, TYPE=S3      , ELSET=THIN SHELL1
      1,    248,    249,    247
      2,    252,    248,    247
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*SHELL SECTION,
 ELSET=THIN SHELL1 ,
 SECTION INTEGRATION=SIMPSON ,
 MATERIAL=GENERIC_ISOTROPIC_STEEL
  1.00000E+00,
*MATERIAL,NAME=GENERIC_ISOTROPIC_STEEL
*ELASTIC,TYPE=ISOTROPIC
 2.06800E+05,  2.90000E-01
*DENSITY
 7.82000E-09,
*EXPANSION,TYPE=ISO,ZERO=21.85
 1.17000E-05,
*CONDUCTIVITY,TYPE=ISO
 4.50000E+01,
**%
*ELSET, ELSET=ALLELEMENTS
 THIN SHELL1 ,
**%
**%
*PHYSICAL CONSTANTS,
 STEFAN BOLTZMANN= 0.56696E-10,
 ABSOLUTE ZERO=-0.27315E+03
**%
**%==========================================
**%          HISTORY DATA
**%==========================================
**%
**% ====== STEP NUMBER   1 ======
**%
*STEP,INC=10
*STATIC
*NODE FILE,FREQUENCY=1,GLOBAL=YES
U,
*OUTPUT, FIELD, FREQUENCY=1
*NODE OUTPUT, NSET=ALLNODES
U,
*EL FILE, FREQUENCY=1, POSITION=NODES, DIRECTIONS=YES
S,E
*OUTPUT, FIELD, FREQUENCY=1
*ELEMENT OUTPUT, ELSET=ALLELEMENTS
S,E
*END STEP
