**%   ============================================================
**%
**%              I-DEAS 12M1 ABAQUS STANDARD TRANSLATOR
**%                     FOR ABAQUS VERSION 6.x
**%
**%          MODEL FILE: C:\DOCUME~1\RENAUD~1\eprouvette_revue2.mf1
**%          INPUT FILE: meshREVUE.inp
**%            EXPORTED: AT 11:50:55 ON 01-Jan-02
**%                PART: reajuste_extrude
**%                 FEM: Fem1
**%
**%               UNITS: MM-mm (milli-newton)
**%                     ... LENGTH : mm
**%                     ... TIME   : sec
**%                     ... MASS   : kilogram (kg)
**%                     ... FORCE  : milli-newton
**%                     ... TEMPERATURE : deg Celsius
**%
**%         COORDINATE SYSTEM: PART
**%
**%             SUBSET EXPORT: OFF
**%
**%       NODE ZERO TOLERANCE: OFF
**%
**%   ============================================================
**%
**%
*HEADING
SDRC I-DEAS ABAQUS FILE TRANSLATOR  01-Jan-02   11:50:55
**%==========================================
**%          MODAL DATA
**%==========================================
*NODE, NSET=ALLNODES, SYSTEM=R
          1, 6.2000000E+01, 4.5000000E+01, 0.0000000E+00
          2,-5.5000000E+01, 3.0000000E+00, 0.0000000E+00
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*ELEMENT, TYPE=S3      , ELSET=THIN SHELL1
      1,   1062,   1064,    968
      2,   1064,    969,    968
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*SHELL SECTION,
 ELSET=THIN SHELL1 ,
 SECTION INTEGRATION=SIMPSON ,
 MATERIAL=GENERIC_ISOTROPIC_STEEL
  1.00000E+00,
*MATERIAL,NAME=GENERIC_ISOTROPIC_STEEL
*ELASTIC,TYPE=ISOTROPIC
 2.06800E+08,  2.90000E-01
*DENSITY
 7.82000E-06,
*EXPANSION,TYPE=ISO,ZERO=21.85
 1.17000E-05,
*CONDUCTIVITY,TYPE=ISO
 4.50000E+04,
**%
*ELSET, ELSET=ALLELEMENTS
 THIN SHELL1 ,
**%
**%
*PHYSICAL CONSTANTS,
 STEFAN BOLTZMANN= 0.56696E-07,
 ABSOLUTE ZERO=-0.27315E+03
**%
**%==========================================
**%          HISTORY DATA
**%==========================================
**%
**% ====== STEP NUMBER   1 ======
**%
*STEP,INC=10
*STATIC
*NODE FILE,FREQUENCY=1,GLOBAL=YES
U,
*OUTPUT, FIELD, FREQUENCY=1
*NODE OUTPUT, NSET=ALLNODES
U,
*EL FILE, FREQUENCY=1, POSITION=NODES, DIRECTIONS=YES
S,E
*OUTPUT, FIELD, FREQUENCY=1
*ELEMENT OUTPUT, ELSET=ALLELEMENTS
S,E
*END STEP
